# Buck Converter Design:
mΩ ≡ 1/1000*Ω
# Design Equations:
# Input Parameters:
Vout := 5 V
f_s := 100 kHz
R_L := 100*mΩ
R_ESR := 10*mΩ
V_g := 28 V
T_s := 1/f_s = 10 μs
R_ON := 50*mΩ
V_D := 0.7 V
Load := 1*A
RippleCurrent := 0.1*Load = 0.1 A
RippleVoltage := 10 mV
# Output Parameters:
D := Vout/V_g = 0.178571
L_RECOMMENDED := (V_g - Vout)*D*T_s/(2*RippleCurrent) = 205.357 μH
Dp := 1 - D = 0.821429
C_RECOMMENDED := RippleCurrent*T_s/(8*RippleVoltage) = 12.5 μF
R := Vout/Load = 5 Ω
L_out := 220 μH
C_out := 15 μF
# Steady-State Graph:
# Input Voltage to Output Voltage Transfer Function:
A == Vout/V_g
A := D*(D*(1/(R_L + R_ON)) + Dp*(1/R_L))*R/(1 + (D*(1/(R_L + R_ON)) + Dp*(1/R_L))*R) = 0.174853
Efficiency := A/D = 0.979177
DiodeLoss := Dp*Load*V_D = 0.575 W
TotalEfficiency := Vout*Load/((1 - Efficiency)*Vout*Load + Vout*Load + DiodeLoss) = 0.880419
# Input Voltage to Output Current Transfer Function:
B == I/V_g
B := D*(D*(1/(R_L + R_ON)) + Dp*(1/R_L))/(1 + (D*(1/(R_L + R_ON)) + Dp*(1/R_L))*R) = 0.0349706 1/Ω
# Small-Signal Graph:
steps := 0, 1 .. 200000
f[steps] := 0.1 Hz*steps
f =  # no stored result
w[steps] := 2*π*f[steps]
s[steps] := 1i*w[steps]
# Input Voltage to Output Voltage Transfer Function:
C == v_hat/v_ghat
C[steps] := D*(R/(R + R_L))*(1 + s[steps]*R_ESR*C_out)/(1 + s[steps]*(L_out + R_L*R*C_out + R*R_ESR*C_out + R_L*R_ESR*C_out)/(R + R_L) + s[steps]^2*(R + R_ESR)*L_out*C_out/(R + R_L))
Ccheck[steps]
magC[steps] := 20*log(|C[steps]|)
argC[steps] := arg(C[steps])*180/π
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magC =  # no stored result
argC =  # no stored result
max(magC) = -12.3165
min(argC) = -172.526
# Duty Cycle to Output Voltage Transfer Function:
E == v_hat/d_hat
E[steps] := V_g*(R/(R + R_L))*(1 + s[steps]*R_ESR*C_out)/(1 + s[steps]*(L_out + R_L*R*C_out + R*R_ESR*C_out + R_L*R_ESR*C_out)/(R + R_L) + s[steps]^2*(R + R_ESR)*L_out*C_out/(R + R_L))
magE[steps] := 20*log(|E[steps]*1/V|)
argE[steps] := arg(E[steps])*180/π
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magE =  # no stored result
argE =  # no stored result
max(magE) = 31.5904
min(argE) = -172.526
# Input Impedance:
F == v_ghat/i_ghat
F[steps] := (1/D^2)*(R + R_L)*(1 + s[steps]*(L_out + R_L*R*C_out + R*R_ESR*C_out + R_L*R_ESR*C_out)/(R + R_L) + s[steps]^2*(R + R_ESR)*L_out*C_out/(R + R_L))/(1 + s[steps]*(R_ESR + R)*C_out)
magF[steps] := 20*log(|F[steps]*1/Ω|)
argF[steps] := arg(F[steps])*180/π
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magF =  # no stored result
argF =  # no stored result
max(magF) = 58.5946
min(argF) = -7.407
# Output Impedance:
G == v_ohat/i_ohat
G[steps] := R*R_L/(R_L - R)*(1 + s[steps]*(L_out/R_L + R_ESR*C_out) + s[steps]^2*(R_ESR/R_L*L_out*C_out))/(1 + s[steps]*(L_out + R_L*R*C_out + R*R_ESR*C_out + R_L*R_ESR*C_out)/(R_L - R) + s[steps]^2*(R + R_ESR)*L_out*C_out/(R_L - R))
magG[steps] := 20*log(|G[steps]*1/Ω|)
argG[steps] := arg(G[steps])*180/π
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magG =  # no stored result
argG =  # no stored result
max(magG) = 5.07728
min(argG) = -179.919
